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/batch
! ANSYS input file written by Workbench version 2024 R2
! File used for geometry attach: C:\Users\29804\Desktop\Finite element simulation exam\ansys\test_files\dp0\global\MECH\SYS\AssembledModel\SYS.pmdb
/title,test--____ (B4)
/COM,/COM,     SoS, 24.2
/COM,/COM,     ANSYSMotion, 2024.2
/com,--- Data in consistent NMM units. See Solving Units in the help system for more information.
/units,MPA
/prep7
! Turn off shape checking because checks already performed inside WB mesher.
! See help system for more information.
SHPP,OFF,,NOWARN
etcon,set             ! allow ANSYS to choose best KEYOP's for 180x elements, resets any applicable keyopt to MAPDL defaults
/com,*********** Nodes for the whole assembly ***********
nblock,3,,6763
(1i9,3e20.9e3)
        1     0.000000000E+00     0.000000000E+00     0.000000000E+00
        2     0.000000000E+00     1.000000000E+00     0.000000000E+00
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-1
/com,*********** Elements for Body 1 'Surface Body 1(____)' ***********
et,1,182
keyo,1,3,3
eblock,19,solid,,5993
(19i9)
        1        1        1        1        0        0        0        0        4        0      254      789      775      810      810
        1        1        1        1        0        0        0        0        4        0      497     1048     1024      999      999
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-1
/com,*********** Send User Defined Coordinate System(s) ***********
csys,0
toffst,273.15,      ! Temperature offset from absolute zero
/com,*********** Set Reference Temperature ***********
tref,22.
/com,*********** Send Materials ***********
Temperature = 'TEMP' ! Temperature
MP,DENS,1,7.85e-09,	! tonne mm^-3
MP,ALPX,1,1.2e-05,	! C^-1
MP,C,1,434000000,	! mm^2 s^-2 C^-1
MP,KXX,1,60.5,	! tonne mm s^-3 C^-1
MP,RSVX,1,0.00017,	! ohm mm
MP,EX,1,210000,	! tonne s^-2 mm^-1
MP,NUXY,1,0.3,
MP,MURX,1,10000,

/com,*********** Send Sheet Properties ***********
r,1,10.

!************************* Model Summary ********************
!Surface Body 1(外部模型),	结构钢,	matid,	1
!************************* End Model Summary ********************
CMBLOCK,PROPERTY1,ELEM,     5993
(8i10)
         1         2         3         4         5         6         7         8
         9        10        11        12        13        14        15        16
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/com,*********** Fixed Supports ***********
CMBLOCK,_FIXEDSU,NODE,       51
(8i10)
        51        52        53        54        55        56        57        58
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cmsel,s,_FIXEDSU
d,all,all
nsel,all
/com,*********** Define Vertex Force Using Follower Elements ***********
et,2,201
keyo,2,1,1          ! Keep the direction constant
keyo,2,2,1          ! Apply Forces only, not moment
mat,2
real,2
type,2
en,5994,301
r,2
rmod,2,1,1.0,              ! FX
mat,3
real,3
type,2
en,5995,301
r,3
rmod,3,2,1.0,              ! FY
fini
/com,****************************************************************************
/com,*************************    SOLUTION       ********************************
/com,****************************************************************************
/solu
antype,4                   ! transient analysis type for quasi static solution
_thickRatio=  0     ! Ratio of thick parts in the model
eqsl,sparse,,,,,1
cntr,print,1               ! print out contact info and also make no initial contact an error
cncheck,dmp		!	Enable program controlled contact splitting for distributed memory parallel run
dmpoption,emat,no             ! Don't combine emat file for DANSYS
dmpoption,esav,no             ! Don't combine esav file for DANSYS
tintp,quas				   ! Backward Euler Time Integration for quasi static solution
trnopt,,,,,,,,,yes        ! Enable numerical damping for quasi static solution
nldiag,cont,iter           ! print out contact info each equilibrium iteration
rescontrol,,none                 ! Do not keep any restart files
/com,****************************************************
/com,******************* SOLVE FOR LS 1 OF 1 ****************
esel,s,real,,2
sfe,all,1,pres,1,0.
esel,s,real,,3
sfe,all,1,pres,1,-1000.
esel,all
nsub,1,1,1
time,20.
outres,erase
outres,all,none
outres,nsol,all,
outres,rsol,all
outres,eangl,all
outres,etmp,all
outres,veng,all
outres,strs,all,
outres,epel,all,
outres,eppl,all,
outres,cont,all,
! *********** WB SOLVE COMMAND ***********
! check interactive state
*get,ANSINTER_,active,,int
*if,ANSINTER_,ne,0,then
/eof
*endif
solve
/com *************** Write FE CONNECTORS *********
CEWRITE,file,ce,,INTE
/com,****************************************************
/com,*************** FINISHED SOLVE FOR LS 1 *************
*get,_NSOLTHREADS,active,0,ntfs
*get,_NSOLPROCESSES,active,0,npfs
/post1
fini
